<?xml version="1.0" encoding="ISO-8859-1"?>
<neuroml xmlns="http://www.neuroml.org/schema/neuroml2"
         xmlns:xsi="http://www.w3.org/2001/XMLSchema-instance"
         xsi:schemaLocation="http://www.neuroml.org/schema/neuroml2 https://raw.github.com/NeuroML/NeuroML2/development/Schemas/NeuroML2/NeuroML_v2beta4.xsd"
         id="NaV">

    <ionChannel id="NaV" conductance="10pS" type="ionChannelHH" species="na">

        <notes>Mouse sodium current
: Kinetics of Carter et al. (2012)
: Based on 37 degC recordings from mouse hippocampal CA1 pyramids</notes>

        <annotation>
            <rdf:RDF xmlns:rdf="http://www.w3.org/1999/02/22-rdf-syntax-ns#">
                <rdf:Description rdf:about="NaV">

                    <bqbiol:isVersionOf xmlns:bqbiol="http://biomodels.net/biology-qualifiers/">
                        <rdf:Bag>
                            <rdf:li>Na channels</rdf:li>
                            <rdf:li rdf:resource="http://senselab.med.yale.edu/neurondb/channelGene2.aspx#table2"/>
                        </rdf:Bag>
                    </bqbiol:isVersionOf>

                </rdf:Description>
            </rdf:RDF>
        </annotation>

        <gate id="O" type="gateHHrates" instances="1">
            <q10Settings type="q10Fixed" fixedQ10="2.95288264"/>
            <forwardRate type="HHExpLinearRate" rate="1.092per_ms" scale="6mV" midpoint="-38mV"/>
            <reverseRate type="HHExpLinearRate" rate="0.744per_ms" scale="-6mV" midpoint="-38mV"/>
        </gate>

    </ionChannel>

</neuroml>
